s*Heading
**
** Job name: fml_frm_sc8r_deg0_vis00025_std Model name: BluntNotch
*Preprint, echo=NO, model=NO, history=NO, contact=NO
**
** PARTS
**
*Part, name=Part-1
*End Part
**
*Part, name=Part-2
*End Part
**
**
** ASSEMBLY
**
*Assembly, name=Assembly
**
*Instance, name=Part-1-1, part=Part-1
*Node
      1,         150.,          10.,  0.300000012
      2,          10.,          10.,  0.300000012
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*Element, type=COH3D8
  1,    1,   81, 2217,  210,    7,  276, 2931,  275
  2,   81,   82, 2218, 2217,  276,  277, 2932, 2931
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*Element, type=SC8R
 781,    7,  276, 2931,  275,   11,  406, 3645,  405
 782,  276,  277, 2932, 2931,  406,  407, 3646, 3645
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*Element, type=C3D8I
3901,   23,  796, 5787,  795,   25,  861, 6501,  990
3902,  796,  797, 5788, 5787,  861,  862, 6502, 6501
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*Nset, nset=aluminum_ext
     1,     2,     3,     4,    29,    30
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*Elset, elset=aluminum_ext
 6553, 6554, 6555, 6556, 6557, 6558
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*Nset, nset=cohesive_ext
     1,     2,     3,     4,     5,     6
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*Elset, elset=cohesive_ext
    1,    2,    3,    4,    5,    6
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*Nset, nset=composite_ext
     5,     6,     7,     8,     9,    10
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*Elset, elset=composite_ext
  781,  782,  783,  784,  785,  786
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*Nset, nset=cohesive_middle
     9,    10,    11,    12,    13,    14
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*Elset, elset=cohesive_middle
 1561, 1562, 1563, 1564, 1565, 1566
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*Nset, nset=composite_int
    13,    14,    15,    16,    17,    18
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*Elset, elset=composite_int
 2341, 2342, 2343, 2344, 2345, 2346
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*Nset, nset=cohesive_int
    17,    18,    19,    20,    21,    22
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*Elset, elset=cohesive_int
  3121,  3122,  3123,  3124,  3125,  3126
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*Nset, nset=aluminum_int
    21,    22,    23,    24,    25,    26
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*Elset, elset=aluminum_int
  3901,  3902,  3903,  3904,  3905,  3906
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** Region: (cohesive_sec_ext:cohesive_ext), (Controls:Default)
** Section: cohesive_sec_ext
*Cohesive Section, elset=cohesive_ext, material=cohesive, response=TRACTION SEPARATION, thickness=SPECIFIED
1.,
*Orientation, name=Ori-1
          0.,          -1.,           0.,           1.,           0.,           0.
3, 0.
** Region: (composite_sec_ext:composite_ext), (Controls:EC-1), (Material Orientation:composite_ext)
** Section: composite_sec_ext
*Shell Section, elset=composite_ext, orientation=Ori-1, controls=EC-1, material=composite, poisson=0.33, thickness modulus=9500.
0.125, 5
*Transverse Shear Stiffness
572.92, 312.5, 0.
** Region: (cohesive_sec_middle:cohesive_middle), (Controls:Default)
** Section: cohesive_sec_middle
*Cohesive Section, elset=cohesive_middle, material=cohesive, response=TRACTION SEPARATION, thickness=SPECIFIED
1.,
*Orientation, name=Ori-2
          1.,           0.,           0.,           0.,           1.,           0.
3, 0.
** Region: (composite_sec_int:composite_int), (Controls:EC-1), (Material Orientation:composite_int)
** Section: composite_sec_int
*Shell Section, elset=composite_int, orientation=Ori-2, controls=EC-1, material=composite, poisson=0.33, thickness modulus=9500.
0.125, 5
*Transverse Shear Stiffness
572.92, 312.5, 0.
** Region: (cohesive_sec_int:cohesive_int), (Controls:Default)
** Section: cohesive_sec_int
*Cohesive Section, elset=cohesive_int, material=cohesive, response=TRACTION SEPARATION, thickness=SPECIFIED
1.,
** Region: (aluminum_sec_int:aluminum_int), (Controls:Default)
** Section: aluminum_sec_int
*Solid Section, elset=aluminum_int, material=aluminum
0.15,
** Region: (aluminum_sec_ext:aluminum_ext), (Controls:Default)
** Section: aluminum_sec_ext
*Solid Section, elset=aluminum_ext, material=aluminum
0.3,
*End Instance
**
*Instance, name=Part-2-1, part=Part-2
*Node
      1,         151.,           0.,           0.
*Nset, nset=Part-2-1-RefPt_, internal
1,
*End Instance
**
*Nset, nset=x-symm, instance=Part-1-1
   43,   44,   46,   50,   53,   54
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*Elset, elset=x-symm, instance=Part-1-1
  6665,  6673,  6681,  6689,  6697,  6705
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*Nset, nset=y-symm, instance=Part-1-1
    3,    4,    5,    6,    9,   10
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*Elset, elset=y-symm, instance=Part-1-1
   729,   730,   731,   732,   733,   734
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*Nset, nset=z-symm, instance=Part-1-1
    25,    26,    27,    28,    41,    42
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*Elset, elset=z-symm, instance=Part-1-1
  3901,  3902,  3903,  3904,  3905,  3906
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*Nset, nset=x-load, instance=Part-1-1
    1,    4,    6,    7,   10,   11
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*Elset, elset=x-load, instance=Part-1-1
    1,   53,  105,  157,  209,  261
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*Nset, nset=x-ref, instance=Part-2-1
 1,
*Nset, nset=QA_TEST_RF, instance=Part-2-1
 1,
*Nset, nset=aluminum_ext, instance=Part-1-1
     1,     2,     3,     4,    29,    30
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*Elset, elset=aluminum_ext, instance=Part-1-1
 6553, 6554, 6555, 6556, 6557, 6558
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*Nset, nset=cohesive_ext, instance=Part-1-1
     1,     2,     3,     4,     5,     6
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*Elset, elset=cohesive_ext, instance=Part-1-1
    1,    2,    3,    4,    5,    6
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*Nset, nset=composite_ext, instance=Part-1-1
     5,     6,     7,     8,     9,    10
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*Elset, elset=composite_ext, instance=Part-1-1
  781,  782,  783,  784,  785,  786
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*Nset, nset=cohesive_middle, instance=Part-1-1
     9,    10,    11,    12,    13,    14
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*Elset, elset=cohesive_middle, instance=Part-1-1
 1561, 1562, 1563, 1564, 1565, 1566
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*Nset, nset=composite_int, instance=Part-1-1
    13,    14,    15,    16,    17,    18
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*Elset, elset=composite_int, instance=Part-1-1
 2341, 2342, 2343, 2344, 2345, 2346
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*Nset, nset=cohesive_int, instance=Part-1-1
    17,    18,    19,    20,    21,    22
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*Elset, elset=cohesive_int, instance=Part-1-1
  3121,  3122,  3123,  3124,  3125,  3126
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*Nset, nset=aluminum_int, instance=Part-1-1
    21,    22,    23,    24,    25,    26
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*Elset, elset=aluminum_int, instance=Part-1-1
  3901,  3902,  3903,  3904,  3905,  3906
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** Constraint: Constraint-1
*Equation
2
x-load, 1, 1.
x-ref, 1, -1.
*End Assembly
**
** ELEMENT CONTROLS
**
*Section Controls, name=EC-1,hourglass=STIFFNESS
1.0, 1.0, 1.0
*Amplitude, name=disp-amp, time=TOTAL TIME
0., 0., 1., 1.
**
** MATERIALS
**
*Material, name=aluminum
*Elastic
73800., 0.33
*Plastic
300.,      0.
320., 0.00016
340., 0.00047
355., 0.00119
375., 0.00449
390., 0.01036
410.,  0.0213
430., 0.03439
450., 0.05133
470.,    0.08
484.,  0.1471
*Material, name=cohesive
*Elastic,type=traction
2000e3,751.8796992e3,751.8796992e3
*damage initiation,criterion=quade
2.5e-5,6.65e-5,6.65e-5
*damage evolution,type=energy,mixed mode behavior=power,softening=exponential,mode mix ratio=energy,power=2
4,4,4
*Material, name=composite
*ELASTIC,TYPE=LAMINA
 55000., 9500.,0.33,5500.0,3000.0,3000.0
*DAMAGE INITIATION,CRITERION=HASHIN,ALPHA=0.0
   2500.0,  2000.0,  50.0,  150.0, 50.0,     75.0
** <X_T>    <X_C>   <Y_T>   <Y_C>  <S_L>     <S_T>
*DAMAGE EVOLUTION, TYPE=ENERGY, SOFTENING=LINEAR
 12.5,12.5,1.0,1.0
*DAMAGE STABILIZATION
   0.00025, 0.00025, 0.005, 0.005
**
** BOUNDARY CONDITIONS
**
** Name: bc-xsymm Type: Symmetry/Antisymmetry/Encastre
*Boundary
x-symm, XSYMM
** Name: bc-ysymm Type: Symmetry/Antisymmetry/Encastre
*Boundary
y-symm, YSYMM
** Name: bc-zsymm Type: Symmetry/Antisymmetry/Encastre
*Boundary
z-symm, ZSYMM
*time Points, Name=TpRf,gen
 0.0,0.15,0.01
 0.15,0.27,0.005
** ----------------------------------------------------------------
**
** STEP: Step-1
**
*Step, name=Step-1, nlgeom=YES, inc=1000, unsymm=YES, convert sdi=no
uniaxial loading
*Static
0.01, 0.23, 1.0e-08, 0.01
**
** BOUNDARY CONDITIONS
**
** Name: xload Type: Displacement/Rotation
*Boundary, amplitude=disp-amp
x-ref, 1, 1, 10.
**
** OUTPUT REQUESTS
**
*Restart, write, frequency=0
**
** FIELD OUTPUT: F-Output-1
**
*Output, field,freq=10
*Node Output
RF, U
*Element Output, elset=composite_ext, directions=YES
 DMICRT,
 DAMAGEFT,
 DAMAGEFC,
 DAMAGEMT,
 DAMAGEMC,
 S,
**
** FIELD OUTPUT: F-Output-8
**
*Element Output, elset=composite_int, directions=YES
 DMICRT,
 DAMAGEFT,
 DAMAGEFC,
 DAMAGEMT,
 DAMAGEMC,
 S,
*Element Output, elset=cohesive_ext, directions=YES
NE, SDEG
**
** FIELD OUTPUT: F-Output-5
**
*Element Output, elset=cohesive_int, directions=YES
NE, SDEG
**
** FIELD OUTPUT: F-Output-6
**
*Element Output, elset=cohesive_middle, directions=YES
NE, SDEG
*********************
*Output, history, freq=1
*Node Output, nset=x-ref
 RF1,
*Output, history, time point=TpRf
*Node Output, nset=x-ref
 U1
*End Step
